// SBML level 3 version 1

model Adapted_from_Erreger_2005()
  // Author: JM Bouteiller Description: Model from Erreger 2005 (Subunit-specific gating controls rat NR1NR2A and ...) v01: Only contains the kinetic scheme. v02: Added all components to calculate current (Mg, perm_Ca, etc.)
  // model units - substance: substance, time: time, volume: volume, area: area, length: length, extent: substance

  // Compartments:
  compartment default = 1 volume;

  // Species:
  substanceOnly species R in default = 1;
  species RA in default = 0;
  species RA2 in default = 0;
  species D1 in default = 0;
  species D2 in default = 0;
  species RA2f in default = 0;
  species RA2s in default = 0;
  species RA2fs in default = 0;
  species $Glu in default = 0;
  substanceOnly species $Mg in default = 1;
  substanceOnly species $Vm in default = -70;

  // Parameters:
  kon = 31.6 per_mM_per_msec;
  koff = 1.01 per_msec;
  kd1p = 0.0851 per_msec;
  kd1m = 0.0297 per_msec;
  kd2p = 0.23 per_msec;
  kd2m = 0.00101 per_msec;
  ksp = 0.23 per_msec;
  ksm = 0.178 per_msec;
  kfp = 3.14 per_msec;
  kfm = 0.174 pS;
  g1 = 40 pS;
  g2 = 247 pS;
  Vrev = -0.7 mV;
  alpha = 0.01 dimensionless;
  cond has pS;
  Iunit has pA;
  I has pA;
  nbNMDAR = 1 dimensionless;
  Omg has pS;
  Ica has pA;
  perm_Ca = 0.1 dimensionless;

  // Assignment rules:
  Omg := RA2fs/(1 + exp(-62*Vm*0.001)*Mg/3.57);
  cond := g1 + (g2 - g1)/(1 + exp(alpha*Vm*0.001));
  Iunit := cond*(Vm - Vrev)*0.001*Omg;
  I := Iunit*nbNMDAR;
  Ica := I*perm_Ca;

  // Reactions:
  re4: R + $Glu -> RA; 2*kon*R*Glu - RA*koff;
  re5: RA + $Glu -> RA2; RA*Glu*kon - RA2*2*koff;
  re6: RA2 -> D1; RA2*kd1m - D1*kd1p;
  re7: RA2 -> D2; RA2*kd2p - D2*kd2m;
  re8: RA2 -> RA2f; RA2*kfp - RA2f*kfm;
  re9: RA2 -> RA2s; RA2*ksp - RA2s*ksm;
  re10: RA2s -> RA2fs; RA2s*kfp - RA2fs*kfm;
  re11: RA2f -> RA2fs; RA2f*ksp - RA2fs*ksm;

  // Unit definitions:
  unit pS = 1e-12 siemens;
  unit pA = 1e-12 ampere;
  unit mV = 1e-3 volt;
  unit msec = 1e-3 second;
  unit mM = 1e-3 mole / litre; mM is "milliMolar";
  unit per_mM_per_msec = litre / (1e-3 mole * 1e-3 second);
  unit per_msec = 1 / (1e-3 second);
  unit substance = mole;
  unit volume = litre;
  unit area = metre^2;
  unit length = metre;
  unit time = second;
end
